freq[0] := 6  # disabled
freq[0] := 10
amp[0] := 10
NS := 100000
NF := 11
freq[1] := 60  # disabled
freq[1] := 50
amp[1] := 10
dfreq := 200000
freq[2] := 80  # disabled
freq[2] := 100
amp[2] := 0
dtime := 1/dfreq = 5e-6
freq[3] := 100  # disabled
freq[3] := 500
amp[3] := 10
dn := dfreq/NS = 2
freq[4] := 200  # disabled
freq[4] := 1000
amp[4] := 0
i := 0, 1 .. NS
freq[5] := 300  # disabled
freq[5] := 5000
amp[5] := 0
ns[i] := 1 + i
freq[6] := 400  # disabled
freq[6] := 10000
amp[6] := 10
time[i] := ns[i]*dtime
freq[7] := 500  # disabled
freq[7] := 25000
amp[7] := 0
freq[8] := 600  # disabled
freq[8] := 50000
amp[8] := 0
freq[9] := 800  # disabled
freq[9] := 75000
amp[9] := 10
freq[10] := 1000  # disabled
freq[10] := 100000
amp[10] := 0
f(x) := sum(amp[i]*(cos(2*π*freq[i]*x) + 1), i = 0 .. NF - 1)
s[i] := f(time[i])
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sc := ceil(s)
sum(ceil(s[i]), i = 0 .. NS)/NS = 50.4971
S(freq) :=
    k ← freq/dn
    alpha ← 2*cos(2*π*k/NS)
    Wre ← cos(2*π*k/NS)
    Wim ← sin(2*π*k/NS)
    vm1 ← 0
    vm2 ← 0
    for iii ∈ 0, 1 .. NS - 1
        scp[iii] ← sc[iii]*13/256
        v[iii] ← scp[iii] + alpha*vm1 - vm2 if iii == 0
        v[iii] ← scp[iii] + alpha*v[iii - 1] - vm1 if iii == 1
        v[iii] ← scp[iii] + alpha*v[iii - 1] - v[iii - 2] otherwise
        iii ← iii + 1
    vWre ← v[NS - 2]*Wre
    vWim ← v[NS - 2]*Wim
    S ← ((vWre - v[NS - 3])^2 + vWim^2)*1
    M[0] ← S
    M[1] ← v
    M[2] ← Wre
    M[3] ← Wim
    M[4] ← vWre
    M[5] ← vWim
    M[6] ← alpha
    return M
logFreq(amp) :=
    for iii ∈ 0, 1 .. NF - 1
        v[iii] ← 0 if amp[iii] == 0
        v[iii] ← 1 otherwise
    return v
(39.421295/NS)^2
S(freq[9])[1] =  # no stored result
1.9999999013
S(freq[0])[6] = 2
S(freq[0])[2] = 1
0.999999950652
i := 0, 1 .. NF - 1
S[i] := S(freq[i])[0]
lF := logFreq(amp)
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[6.44364074*10^8]
sc =  # no stored result
freq = [10; 50; 100; 500; 1000; 5000; 10000; 25000; 50000; 75000; 100000]
lF = [1; 1; 0; 1; 0; 0; 1; 0; 0; 1; 0]
ceil(S) =  # no stored result
# D:\Desktop\Study_now\SRW\GoertzelAlgorithm\src\sim\data\sample.csv
# D:\Desktop\Study_now\SRW\GoertzelAlgorithm\src\sim\data\freq.csv
# D:\Desktop\Study_now\SRW\GoertzelAlgorithm\src\sim\data\data.csv
i := 0, 1 .. NS
S1 := CFFT(sc)
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